<?xml version="1.0"?>
<Node gravity="0 0 0" dt="0.01" >
    <RequiredPlugin pluginName='SofaOpenglVisual'/>
	<RequiredPlugin pluginName='SofaPreconditioner'/>
	<RequiredPlugin name="OpenCVPlugin" pluginName="OpenCVPlugin" />
	<RequiredPlugin name="CollisionAlgorithm" pluginName="CollisionAlgorithm" />
	<RequiredPlugin name="ConstraintGeometry" pluginName="ConstraintGeometry" />
	<RequiredPlugin name="registrationconstraint" pluginName="registrationconstraint" />

    <RequiredPlugin pluginName="SofaCUDA" />
	<RequiredPlugin pluginName="SofaCUDADev" />
	<RequiredPlugin pluginName="SofaAsyncSolvers" />
	<RequiredPlugin pluginName="SofaCUDASolvers" />

    <RequiredPlugin pluginName="ConectPlugin" />

    <RequiredPlugin name="realsenseplugin" pluginName="realsenseplugin" />
	<RequiredPlugin name="PCLPlugin" pluginName="PCLPlugin" />

<!-- 	<RequiredPlugin name="Optimus" pluginName="Optimus" /> -->

    <FreeMotionAnimationLoop />
	<GenericConstraintSolver maxIt="300" tolerance="0.001"/>

    <RealSenseCam
	    name="rs"
		alpha="0.8"
		delta="60"
		depthScale="6"
                intrinsics="/home/sperry/projects/sofa-build/bin/intrinsics.log"
	/>

    <RealSenseDataFrame2ImageData
	    name="rs2color"
		rsframe="@rs.rsframe"
	/>

    <OpenCVFilter2D
	    name="gauss0"
		in="@rs2color.image"
		kernelsize="23"
	/>

    <ProjectionMatrixImport
	    name="mvimp"
                filename="/home/sperry/projects/sofa-build/bin/modelview.txt"
	/>
	<OpenCVProjectiveViewer
	    name='viewer'
		drawCamera='true'
		image='@gauss0.out'
		projectionMatrix="@mvimp.modelView"
		drawscreenPosition='10 10'
		drawscreenSize='200 200'
		drawcolor="1 1 1 1"
		depth="1"
		drawzNear="0.001"
		drawzFar="100"
		drawViewPort="false"
		drawswapMainView="true"
	/>
	<OpenCVProjectionToCorners
	    name="mv2c"
		resolution="@rs.resolution"
		projectionMatrix="@viewer.modelView"
	/>

    <OpenCVProjectivePointSelector
	    name="ptselector"
		corners="@mv2c.corners"
		image="@gauss0.out"
	/>

    <Node name="gelMarkers" activated="1">
	    <OpenCVOpticalFlowTracker
		    name="opk"
			in="@../ptselector.markers"
			imageCurr="@../gauss0.out"
			corners="@../mv2c.corners"
			draw_pts="1"
			winsize="16 16"
			iter="2"
			level="10" />
		<RealSensePointDeprojector
		    name="deproj"
			input="@opk.out"
			rsframe="@../rs.rsframe"
			rscam="@../rs"
			drawpcl="1" />
		<MechanicalObject template="Vec3d" name="MO" />
		<FixedGeometry name="markers" position="@deproj.output" drawRadius="0.005" color="0 1 0 1" />
		<EngineToTopology name="pointsTopo" position="@deproj.output" />
	</Node>

    <Node name="detector3D" activated="1">
	    <OpenCVOpticalFlowTracker
		    name="opk"
			in="@../ptselector.contour"
			imageCurr="@../gauss0.out"
			corners="@../mv2c.corners"
			draw_pts="1"
			winsize="16 16"
			iter="2"
			level="10" />

        <!-- 		whole surface -->
		<Node name="surface" >
		    <MaskFromContour
			    name="mfc"
				image="@../../rs.rsframe"
				contour="@../opk.out" />
			<RealSenseMaskDeprojector
			    name="deproj"
				rsframe="@../../rs.rsframe"
				rscam="@../../rs"
				input="@mfc.mask"
				downsample="8"
				densify="8"
				drawpcl="0" />
			<Vec2Pcl name="vecsurf" input="@deproj.output" />
			<PCLAlphaFilter
			    name="alpha"
				inpcl="@vecsurf.outpcl"
				alpha="1."
			/>
			<Pcl2Vec name="filteredSurface" inpcl="@vecsurf.outpcl" />

            <MechanicalObject template="Vec3d" name="MO" position="@filteredSurface.output" />
			<FixedGeometry name="surface" position="@filteredSurface.output" drawRadius="0.005" color="0 1 0 1" />
			<EngineToTopology name="pointsTopo" position="@filteredSurface.output" />
			<Vec2Pcl name="vecConv" input="@deproj.synthvol" />
		</Node>

        <!-- 		contour only -->
		<Node name="contour3D" >
		    <OpenCV2D3DConverter
			    name="detector3D"
				input="@../opk.out"
				corners="@../../mv2c.corners"
				image="@../opk.imageCurr"
				drawRadius="0.0025" />

            <MechanicalObject template="Vec3d" name="MO" />
			<FixedGeometry name="contour" position="@detector3D.output" drawRadius="0.005" color="0 1 0 1" />
			<EngineToTopology name="pointsTopo" position="@detector3D.output" />
		</Node>
	</Node>

    <Node name="Liver" activated="1">
	    <EulerImplicitSolver vdamping="0" rayleighMass="0.1" rayleighStiffness="0.1" />

        <PCGLinearSolver iterations="20" tolerance="1e-9" preconditioners="solver" use_precond="true" update_step="1" />

        <CudaSparseLDLSolver name="solver" template="AsyncCompressedRowSparseMatrix3f"/>

        <MeshVTKLoader
		    name="vloader"
			filename="data/meshes/liver000.vtu" />
		<TetrahedronSetTopologyContainer name="Container" position="@vloader.position" tetrahedra="@vloader.tetrahedra" />
		<TetrahedronSetTopologyModifier name="Modifier"/>

        <MechanicalObject name="mstate" template="Vec3d" position="@vloader.position" />

        <UniformMass name="uniformMass" totalMass="1" />
		<TetrahedronFEMForceField name="FEM" youngModulus="10000" poissonRatio="0.35" method="svd" />

        <Node name="Surface">
		    <TriangleSetTopologyContainer name="Container" position="@../vloader.position"  />
			<TetrahedronSetTopologyModifier name="Modifier"/>

            <Tetra2TriangleTopologicalMapping input="@../Container" output="@Container" flipNormals="true"/>
			<MechanicalObject name="dofs" />

            <TriangleGeometry name="triangles" topology="@Container" />
			<PhongTriangleNormalHandler geometry="@triangles" />

            <AABBBroadPhase
			    name="AABBBroadPhase"
				geometry="@triangles"
				nbox="8 8 8"
				color="1 0 0 0.3" />

<!--
            <FilterVisibleTriangleRay
			    name="tfe"
				geometry="@triangles"
				projectionMatrix="@../../mvimp.modelView"
				debugDrawVisibleTriangles="false" />

            <ProjectiveContourGeometry
			    name="contour"
				triangleFilterer="@tfe"
				geometry="@triangles"
				projectionMatrix="@../../mvimp.modelView" />
			<ProjectiveContourNormalHandler geometry="@contour" />
-->

            <BarycentricMapping />
		</Node>

        <Node name="markersPosOnGel" >
		    <VisualStyle displayFlags="showCollisionModels" />
			<PointSetTopologyContainer name="Container" />
			<PointSetTopologyModifier name="ModifierPoint"  />
			<MechanicalObject name="dofs" position="" />
			<PointGeometry name="markersOngel" radius="0.005" />
			<BarycentricMapping />
		</Node >

        <UpdateStateAfterRegistration
		    name="saved"
			pointTopo="Modifier"
			pathToOptkTopo="markersPosOnGel/ModifierPoint"
			pathToMstate="markersPosOnGel/dofs"
			markersPose="@../gelMarkers/deproj.output"
			useTime="0" />


        <Node name="tumor1" >
		    <Mesh filename="data/meshes/tumor1_registered_scaled.obj" name="loader" />
			<MechanicalObject name="mo" />
			<Node>
			    <OglModel color="1.000 0.000 1.000 1" name="visualModel" position="@../mo.position" triangles="@../loader.triangles" />
				<IdentityMapping />
			</Node>
			<BarycentricMapping />
		</Node >

        <Node name="tumor2" >
		    <Mesh filename="data/meshes/tumor2_registered_scaled.obj" name="loader" />
			<MechanicalObject name="mo" />
			<Node >
			    <OglModel color="1.000 0.000 1.000 1" name="visualModel" position="@../mo.position" triangles="@../loader.triangles" />
				<IdentityMapping />
			</Node>
			<BarycentricMapping />
		</Node >

        <Node name="vein1" >
		    <Mesh filename="data/meshes/hepatic_veins_scaled_centered.obj" name="loader" />
			<MechanicalObject name="mo" />
			<Node >
			    <OglModel color="0.000 0.000 1.000 1" name="visualModel" position="@../mo.position" triangles="@../loader.triangles" />
				<IdentityMapping />
			</Node>
			<BarycentricMapping />
		</Node >

        <Node name="vein2" >
		    <Mesh filename="data/meshes/arteries_scaled_centered.obj" name="loader" />
			<MechanicalObject name="mo" />
			<Node >
			    <OglModel color="1.000 0.000 0.000 1" name="visualModel" position="@../mo.position" triangles="@../loader.triangles" />
				<IdentityMapping />
			</Node>
			<BarycentricMapping />
		</Node >

        <Node name="Visual">
		    <TriangleSetTopologyContainer name="Container" position="@../mstate.position"  />
			<TetrahedronSetTopologyModifier name="Modifier"/>
			<Tetra2TriangleTopologicalMapping input="@../Container" output="@Container" flipNormals="true"/>
			<OglModel name="VisualModel" color="1.0 0.0 0.0 0.5" position="@../Container.position" triangles="@Container.triangles" />
			<BarycentricMapping />
		</Node>
		<LinearSolverConstraintCorrection solverName="solver" />
	</Node>

    <Node name="rigidregistration" activated="1" >
	    <Vec2Pcl name="vecConv" input="@../Liver/mstate.position" />
		<Vec2Pcl name="vecConvSurf" input="@../detector3D/surface/deproj.synthvol" />
		<MouseRotationHandler
		    name="mouse"
			input="@vecConv.outpcl"
			mo="@../Liver/mstate" />
		<PCLIterativeClosestPoint
		    name="pclicp"
			source="@vecConv.outpcl"
			target="@vecConvSurf.outpcl"
			mo="@../Liver/mstate" />
	</Node>
    <Node activated="0" name="sliding">
	    <FindClosestProximityAlgorithm
		    name="algoslide"
			from="@../gelMarkers/markers"
			dest="@../Liver/Surface/triangles"
			drawcollision="1" />
		<DistanceFilter name="distance" algo="@algoslide" distance="0.6" />
		<NormalFilter name="normal" algo="@algoslide" angle="-1 0.5" />

        <BindDirection name="normals" />
		<ConstraintBilateral
		    name="sliding"
			input="@algoslide.output"
			directions="@normals"
			maxForce=".1 .1 .1"
			draw_scale="0.05" />

        <FindClosestProximityAlgorithm
		    name="algosurface"
			from="@../detector3D/surface/surface"
			dest="@../Liver/Surface/triangles"
			drawcollision="1" />
		<DistanceFilter name="distancesurf" algo="@algosurface" distance="0.6" />
		<NormalFilter name="normalsurf" algo="@algosurface" angle="-1 0.5" />

        <BindDirection name="normalssurf" />
		<ConstraintBilateral
		    name="surfaceCst"
			input="@algosurface.output"
			directions="@normalssurf"
			maxForce=".1 .1 .1"
			draw_scale="0.05" />

    </Node>

    <Node activated="0" name="pointCloud" >

        <FindClosestProximityAlgorithm
		    name="bindpointcloudAlgo"
			from="@../gelMarkers/markers"
			dest="@../Liver/markersPosOnGel/markersOngel" />

        <DistanceFilter algo="@bindpointcloud" name="distfilter" distance="0.1" />

        <FixedFrameDirection name="normals" />
		<ConstraintBilateral
		    name="bindcst"
			input="@bindpointcloudAlgo.output"
			directions="@normals"
			maxForce="0.8 0.8 0.8" />

    </Node>

    <SwapNodes
	    nodes1="sliding detector3D Surface"
		nodes2="pointCloud"
		noinit="true" />

</Node>
